# Operation of equipment; 4-stroke other lawn and garden equipment, commercial use; gasoline powered

Dataset: openLCA process, unit process
Category: 56: Administrative and Support and Waste Management and Remediation Services / 5617: Services to Buildings and Dwellings
Geography: United States of America (the)
Time period: 2020-01-01 to 2020-12-31
Allocation method: physical allocation
Data quality: US EPA - Process Pedigree Matrix (2;1)
Exchange data quality scheme: US EPA - Flow Pedigree Matrix
Generated by: ERG
Published in: ERG, MOVES nonroad data
restrictionsDescription: These U.S. LCI Database Project data ("Data") are provided by the National Renewable Energy Laboratory ("NREL"), operated by the Alliance for Sustainable Energy, LLC ("Alliance") for the US Department of Energy ("DOE") under Contract No. DE-AC36-08GO28308. The United States Government (the "Government") retains and the user acknowledges that the Government retains a non-exclusive, paid-up, irrevocable, worldwide license to publish or reproduce the published form of these data, or allow others to do so, for Government purposes.
Access to and use of these Data shall impose the following obligations on the user, as set forth in this Agreement. The user is granted the right, without any fee or cost, to use, copy, modify, alter, enhance and distribute these Data for any purpose whatsoever, provided that this entire notice appears in all copies of the Data. Any modification, alteration or enhancement of these data shall be identified and documented by the user. Further, the user agrees to credit the DOE/NREL/Alliance in any publication that results from the use of these Data. The names DOE/NREL/Alliance, however, may not be used in any advertising or publicity to endorse or promote any products or commercial entities unless specific written permission is obtained from DOE/NREL/Alliance. The user also understands that DOE/NREL/Alliance is not obligated to provide the user with any support, consulting, training or assistance of any kind with regard to the use of these Data or to provide the user with any updates, revisions or new versions of these Data.
YOU AGREE TO INDEMNIFY THE GOVERNMENT AND DOE/NREL/ALLIANCE, AND ITS SUBSIDIARIES, AFFILIATES, OFFICERS, AGENTS, AND EMPLOYEES AGAINST ANY CLAIM OR DEMAND, INCLUDING REASONABLE ATTORNEYS' FEES, RELATED TO YOUR USE OF THESE DATA. THESE DATA ARE PROVIDED BY DOE/NREL/ALLIANCE "AS IS" AND ANY EXPRESS OR IMPLIED WARRANTIES, INCLUDING BUT NOT LIMITED TO, THE IMPLIED WARRANTIES OF MERCHANTABILITY AND FITNESS FOR A PARTICULAR PURPOSE ARE DISCLAIMED. IN NO EVENT SHALL THE GOVERNMENT OR DOE/NREL/ALLIANCE BE LIABLE FOR ANY SPECIAL, INDIRECT OR CONSEQUENTIAL DAMAGES OR ANY DAMAGES WHATSOEVER, INCLUDING BUT NOT LIMITED TO CLAIMS ASSOCIATED WITH THE LOSS OF DATA OR PROFITS, WHICH MAY RESULT FROM AN ACTION IN CONTRACT, NEGLIGENCE OR OTHER TORTIOUS CLAIM THAT ARISES OUT OF OR IN CONNECTION WITH THE ACCESS, USE OR PERFORMANCE OF THESE DATA.

## General comment
To be added.

## Technology
[EQUIPMENT DESCRIPTION]

## Geography
This process represents emissions from equipment operated in all U.S. states.

## Reference product
- Operation of equipment; 4-stroke other lawn and garden equipment, commercial use: 1 MJ

## Inputs
- Gasoline, dispensed at pump: 1 btu; data quality (3,1,1,1,1)

## Outputs
All rows: data quality (3,1,1,1,1)
- 1,2,3,4,6,7,8-Heptachlorodibenzo-p-dioxin: 1.19823e-18 kg
- 1,2,3,4,6,7,8-Heptachlorodibenzofuran: 2.43673e-18 kg
- 1,2,3,4,7,8,9-Heptachlorodibenzofuran: 7.79352e-20 kg
- 1,2,3,4,7,8-Hexachlorodibenzo-p-dioxin: 7.79352e-20 kg
- 1,2,3,4,7,8-Hexachlorodibenzofuran: 2.19508e-19 kg
- 1,2,3,6,7,8-Hexachlorodibenzo-p-dioxin: 1.59495e-19 kg
- 1,2,3,6,7,8-Hexachlorodibenzofuran: 2.33604e-19 kg
- 1,2,3,7,8,9-Hexachlorodibenzo-p-dioxin: 9.92818e-20 kg
- 1,2,3,7,8,9-Hexachlorodibenzofuran: 6.38384e-20 kg
- 1,2,3,7,8-Pentachlorodibenzo-p-dioxin: 7.45117e-20 kg
- 1,2,3,7,8-Pentachlorodibenzofuran: 2.65826e-19 kg
- 1,3-Butadiene: 3.6862e-9 kg
- 2,2,4-Trimethylpentane: 2.9962e-8 kg
- 2,3,4,6,7,8-Hexachlorodibenzofuran: 2.73881e-19 kg
- 2,3,4,7,8-Pentachlorodibenzofuran: 1.9467e-19 kg
- 2,3,7,8-Tetrachlorodibenzo-p-dioxin: 1.66544e-19 kg
- 2,3,7,8-Tetrachlorodibenzofuran: 5.55817e-19 kg
- Acenaphthene: 1.18613e-11, 0 kg (2 entries)
- Acenaphthylene: 5.3807e-11, 2.55934e-13 kg (2 entries)
- Acetaldehyde: 2.66395e-9 kg
- Acrolein: 1.33436e-10 kg
- Ammonia: 9.83382e-10 kg
- Anthracene: 9.95876e-12, 2.70629e-13 kg (2 entries)
- Arsenic compounds: 5.42449e-13 kg
- Carbon dioxide: 7.52582e-5 kg
- Benz[a]anthracene: 1.60529e-12, 2.48587e-12 kg (2 entries)
- Benzene: 2.59889e-8 kg
- Benzo[a]fluoranthene: 8.73993e-14, 6.23304e-12 kg (2 entries)
- Benzo(b)fluoranthene: 1.19208e-12, 3.03692e-12 kg (2 entries)
- Benzo[ghi]fluoranthene: 0, 1.6899e-11 kg (2 entries)
- Benzo[k]fluoranthene: 1.19208e-12, 3.03692e-12 kg (2 entries)
- Carbon monoxide: 1.50973e-5 kg
- Chromium(VI): 1.88529e-15 kg
- Chrysene: 1.79852e-12, 2.10625e-12 kg (2 entries)
- Dibenz[a,h]anthracene: 0, 1.45723e-13 kg (2 entries)
- Ethanol: 5.92627e-8 kg
- Ethylbenzene: 1.1206e-8 kg
- Fluoranthene: 1.66475e-11, 9.56386e-13 kg (2 entries)
- Fluorene: 2.40199e-11, 0 kg (2 entries)
- Formaldehyde: 5.23291e-9 kg
- Hexane: 1.30954e-8 kg
- Indeno[1,2,3-cd]pyrene: 0, 6.33101e-12 kg (2 entries)
- Manganese compounds: 2.3309e-13 kg
- Mercury(II): 1.45681e-15 kg
- Mercury: 1.54251e-14, 5.91295e-17 kg (2 entries)
- Methane: 5.02935e-8 kg
- Naphthalene: 6.15362e-10, 7.81273e-13 kg (2 entries)
- Nickel compounds: 2.62226e-13 kg
- 1,2,3,4,6,7,8,9-Octachlorodibenzo-p-dioxin: 9.465e-18 kg
- 1,2,3,4,6,7,8,9-Octachlorodibenzofuran: 2.75895e-18 kg
- Nitrogen oxides: 1.43848e-7 kg
- Phenanthrene: 6.36171e-11, 9.55161e-13 kg (2 entries)
- Particulate matter, ≤ 2.5μm: 1.33105e-8 kg
- Particulate matter, ≤ 10μm: 1.22457e-8 kg
- Propionaldehyde: 1.21928e-10 kg
- Pyrene: 1.90257e-11, 1.03721e-12 kg (2 entries)
- Styrene: 2.12676e-9 kg
- Sulfur dioxide: 4.94278e-10 kg
- Toluene: 7.84513e-8 kg
- Hydrocarbons: 7.34838e-7 kg
- Volatile organic compounds: 6.94586e-7 kg
- Xylene: 4.43185e-8 kg

## Data selection
MOVES runs were performed at the default settings at the state level.

## Data collection
MOVES runs were performed using MOVES4.0.1 in 2024.

## Sampling procedure
Emissions and activity data for each state are combined to generate an activity-weighted average for each region. No uncertainty was assessed.

## Use advice
This process is intended to connect to fuel supply processes from the Heavy Equipment repository.

## Project
This dataset was developed by the Federal LCA Commons Data Curator Eastern Research Group, Inc. (ERG) under subcontract (SUB-2024-10066) to the National Renewable Energy Laboratory under Department of Energy (DOE) Prime Contract No. DE-AC36-08GO28308. The work is funded by DOE's Advanced Materials & Manufacturing Technologies Office (AMMTO).

## Sources
- USEPA MOVES4
