# Operation of equipment; 4-stroke trimmers/edgers/brush cutter, commercial use; gasoline powered

Dataset: openLCA process, unit process
Category: 56: Administrative and Support and Waste Management and Remediation Services / 5617: Services to Buildings and Dwellings
Geography: United States of America (the)
Time period: 2020-01-01 to 2020-12-31
Allocation method: physical allocation
Data quality: US EPA - Process Pedigree Matrix (2;1)
Exchange data quality scheme: US EPA - Flow Pedigree Matrix
Generated by: ERG
Owner: ERG
Published in: ERG (2026) MOVES nonroad v1.0
restrictionsDescription: These U.S. LCI Database Project data ("Data") are provided by the National Renewable Energy Laboratory ("NREL"), operated by the Alliance for Sustainable Energy, LLC ("Alliance") for the US Department of Energy ("DOE") under Contract No. DE-AC36-08GO28308. The United States Government (the "Government") retains and the user acknowledges that the Government retains a non-exclusive, paid-up, irrevocable, worldwide license to publish or reproduce the published form of these data, or allow others to do so, for Government purposes.
Access to and use of these Data shall impose the following obligations on the user, as set forth in this Agreement. The user is granted the right, without any fee or cost, to use, copy, modify, alter, enhance and distribute these Data for any purpose whatsoever, provided that this entire notice appears in all copies of the Data. Any modification, alteration or enhancement of these data shall be identified and documented by the user. Further, the user agrees to credit the DOE/NREL/Alliance in any publication that results from the use of these Data. The names DOE/NREL/Alliance, however, may not be used in any advertising or publicity to endorse or promote any products or commercial entities unless specific written permission is obtained from DOE/NREL/Alliance. The user also understands that DOE/NREL/Alliance is not obligated to provide the user with any support, consulting, training or assistance of any kind with regard to the use of these Data or to provide the user with any updates, revisions or new versions of these Data.
YOU AGREE TO INDEMNIFY THE GOVERNMENT AND DOE/NREL/ALLIANCE, AND ITS SUBSIDIARIES, AFFILIATES, OFFICERS, AGENTS, AND EMPLOYEES AGAINST ANY CLAIM OR DEMAND, INCLUDING REASONABLE ATTORNEYS' FEES, RELATED TO YOUR USE OF THESE DATA. THESE DATA ARE PROVIDED BY DOE/NREL/ALLIANCE "AS IS" AND ANY EXPRESS OR IMPLIED WARRANTIES, INCLUDING BUT NOT LIMITED TO, THE IMPLIED WARRANTIES OF MERCHANTABILITY AND FITNESS FOR A PARTICULAR PURPOSE ARE DISCLAIMED. IN NO EVENT SHALL THE GOVERNMENT OR DOE/NREL/ALLIANCE BE LIABLE FOR ANY SPECIAL, INDIRECT OR CONSEQUENTIAL DAMAGES OR ANY DAMAGES WHATSOEVER, INCLUDING BUT NOT LIMITED TO CLAIMS ASSOCIATED WITH THE LOSS OF DATA OR PROFITS, WHICH MAY RESULT FROM AN ACTION IN CONTRACT, NEGLIGENCE OR OTHER TORTIOUS CLAIM THAT ARISES OUT OF OR IN CONNECTION WITH THE ACCESS, USE OR PERFORMANCE OF THESE DATA.

## General comment
This dataset represents the operation of 4-str trimmers/edgers/brush cutter (com), gasoline powered using gasoline as a fuel source. Emissions and fuel‑consumption data are calculated using EPA’s Motor Vehicle Emission Simulator (MOVES), the regulatory model used to determine emission inventories for equipment used in construction, agriculture, industrial, and commercial sectors. The reference flows are: 1. the operation of equipment providing 1 MJ of energy; and 2. the operation of equipment for 1 hour.

## Technology
This process reflects the gasoline-powered 4-str trimmers/edgers/brush cutter (com), gasoline powered used in the lawn/garden sector, with an average horsepower of 11 hp and a load factor of 0.91.

## Geography
This process represents emissions from equipment operated in all U.S. states.

## Time period
This process reflects the equipment as estimated in 2020. MOVES estimates daily emissions for weekdays and weekends by month and year for calendar years 1990 and 1999 through 2060.

## Reference product
- Operation of equipment; 4-stroke trimmers/edgers/brush cutter, commercial use: 1 MJ

## Inputs
- Gasoline; dispensed at pump: 1 MJ; data quality (3,1,1,1,1)

## Outputs
All rows: data quality (3,1,1,1,1)
- 1,2,3,4,6,7,8-Heptachlorodibenzo-p-dioxin: 1.19823e-18 kg
- 1,2,3,4,6,7,8-Heptachlorodibenzofuran: 2.43673e-18 kg
- 1,2,3,4,7,8,9-Heptachlorodibenzofuran: 7.79352e-20 kg
- 1,2,3,4,7,8-Hexachlorodibenzo-p-dioxin: 7.79352e-20 kg
- 1,2,3,4,7,8-Hexachlorodibenzofuran: 2.19507e-19 kg
- 1,2,3,6,7,8-Hexachlorodibenzo-p-dioxin: 1.59495e-19 kg
- 1,2,3,6,7,8-Hexachlorodibenzofuran: 2.33604e-19 kg
- 1,2,3,7,8,9-Hexachlorodibenzo-p-dioxin: 9.92818e-20 kg
- 1,2,3,7,8,9-Hexachlorodibenzofuran: 6.38384e-20 kg
- 1,2,3,7,8-Pentachlorodibenzo-p-dioxin: 7.45117e-20 kg
- 1,2,3,7,8-Pentachlorodibenzofuran: 2.65826e-19 kg
- 1,3-Butadiene: 3.89017e-9 kg
- 2,2,4-Trimethylpentane: 3.71905e-8 kg
- 2,3,4,6,7,8-Hexachlorodibenzofuran: 2.73881e-19 kg
- 2,3,4,7,8-Pentachlorodibenzofuran: 1.9467e-19 kg
- 2,3,7,8-Tetrachlorodibenzo-p-dioxin: 1.66544e-19 kg
- 2,3,7,8-Tetrachlorodibenzofuran: 5.55817e-19 kg
- Acenaphthene: 1.25168e-11, 0 kg (2 entries)
- Acenaphthylene: 5.67807e-11, 2.86415e-13 kg (2 entries)
- Acetaldehyde: 2.81132e-9 kg
- Acrolein: 1.4081e-10 kg
- Ammonia: 9.83382e-10 kg
- Anthracene: 1.05091e-11, 3.0286e-13 kg (2 entries)
- Arsenic compounds: 5.42449e-13 kg
- Carbon dioxide: 7.51883e-5 kg
- Benz[a]anthracene: 1.69401e-12, 2.78192e-12 kg (2 entries)
- Benzene: 3.27219e-8 kg
- Benzo[a]fluoranthene: 9.22293e-14, 6.97537e-12 kg (2 entries)
- Benzo(b)fluoranthene: 1.25796e-12, 3.39861e-12 kg (2 entries)
- Benzo[ghi]fluoranthene: 0, 1.89116e-11 kg (2 entries)
- Benzo[k]fluoranthene: 1.25796e-12, 3.39861e-12 kg (2 entries)
- Carbon monoxide: 1.50485e-5 kg
- Chromium(VI): 1.88529e-15 kg
- Chrysene: 1.89792e-12, 2.3571e-12 kg (2 entries)
- Dibenz[a,h]anthracene: 0, 1.63078e-13 kg (2 entries)
- Ethanol: 7.81875e-8 kg
- Ethylbenzene: 1.50892e-8 kg
- Fluoranthene: 1.75675e-11, 1.07029e-12 kg (2 entries)
- Fluorene: 2.53474e-11, 0 kg (2 entries)
- Formaldehyde: 5.52243e-9 kg
- Hexane: 1.63896e-8 kg
- Indeno[1,2,3-cd]pyrene: 0, 7.08499e-12 kg (2 entries)
- Manganese compounds: 2.3309e-13 kg
- Mercury(II): 1.45681e-15 kg
- Mercury: 1.54251e-14, 5.91295e-17 kg (2 entries)
- Methane: 5.30769e-8 kg
- Naphthalene: 6.4937e-10, 8.74319e-13 kg (2 entries)
- Nickel compounds: 2.62226e-13 kg
- 1,2,3,4,6,7,8,9-Octachlorodibenzo-p-dioxin: 9.465e-18 kg
- 1,2,3,4,6,7,8,9-Octachlorodibenzofuran: 2.75895e-18 kg
- Nitrogen oxides: 1.43389e-7 kg
- Phenanthrene: 6.71329e-11, 1.06892e-12 kg (2 entries)
- Particulate matter, ≤ 2.5μm: 1.48957e-8 kg
- Particulate matter, ≤ 10μm: 1.37041e-8 kg
- Propionaldehyde: 1.28663e-10 kg
- Pyrene: 2.00772e-11, 1.16073e-12 kg (2 entries)
- Styrene: 2.24444e-9 kg
- Sulfur dioxide: 4.93805e-10 kg
- Toluene: 1.06677e-7 kg
- Hydrocarbons: 9.31818e-7 kg
- Volatile organic compounds: 8.89337e-7 kg
- Xylene: 5.8689e-8 kg

## Completeness
The results include emissions from running exhaust, crankcase venting, refueling vapor and spillage, evaporative tank permeation, evaporative hose permeation, and fuel vapor venting from diurnal, hot soak, and running activity. Evaporative emissions while the equipment is soaking (engine off) are not included. Manufacturing of equipment, roads, and other infrastructure are not included in this dataset. The model for nonroad equipment does not include nitrous oxide (N2O).

## Data selection
MOVES runs were performed at the default settings at the state level.

## Data treatment
Emissions are calculated using an adjusted emission factor multiplied by rated power, load factor, engine population, and activity. The model uses base-year equipment populations by technology type and model year, and applies growth factors to estimate the population in the analysis year. Nonroad emissions by equipment type, fuel type, and age are estimated based on median life at full load, load factors, activity, and age distributions. Equipment populations are allocated to the county level using surrogate data.

## Data collection
MOVES runs were performed using MOVES4.0.1 in 2025.

## Sampling procedure
Emissions and activity data for each state are combined to generate an activity-weighted average for each region. No uncertainty was assessed.

## Use advice
This process has two reference units: MJ of energy delivered by the equipment, hour of equipment use.

## Intended application
The target audience of this model includes LCA practitioners, industry, and the general public. A full inventory of environmental flows are included; thus this unit process can be used for a full range of LCIA impact categories.

## Project
This dataset was developed by the Federal LCA Commons Data Curator Eastern Research Group, Inc. (ERG) under subcontract (SUB-2024-10066) to the National Renewable Energy Laboratory under Department of Energy (DOE) Prime Contract No. DE-AC36-08GO28308. The work is funded by DOE's Advanced Materials & Manufacturing Technologies Office (AMMTO).

## Sources
- ERG (2025) MOVES nonroad data
