# Operation of equipment; other general industrial equipment; liquified petroleum fuel powered

Dataset: openLCA process, unit process
Category: 56: Administrative and Support and Waste Management and Remediation Services / 5612: Facilities Support Services
Geography: United States of America (the)
Time period: 2020-01-01 to 2020-12-31
Allocation method: physical allocation
Data quality: US EPA - Process Pedigree Matrix (2;1)
Exchange data quality scheme: US EPA - Flow Pedigree Matrix
Generated by: ERG
Owner: ERG
Published in: ERG (2026) MOVES nonroad v1.0
restrictionsDescription: These U.S. LCI Database Project data ("Data") are provided by the National Renewable Energy Laboratory ("NREL"), operated by the Alliance for Sustainable Energy, LLC ("Alliance") for the US Department of Energy ("DOE") under Contract No. DE-AC36-08GO28308. The United States Government (the "Government") retains and the user acknowledges that the Government retains a non-exclusive, paid-up, irrevocable, worldwide license to publish or reproduce the published form of these data, or allow others to do so, for Government purposes.
Access to and use of these Data shall impose the following obligations on the user, as set forth in this Agreement. The user is granted the right, without any fee or cost, to use, copy, modify, alter, enhance and distribute these Data for any purpose whatsoever, provided that this entire notice appears in all copies of the Data. Any modification, alteration or enhancement of these data shall be identified and documented by the user. Further, the user agrees to credit the DOE/NREL/Alliance in any publication that results from the use of these Data. The names DOE/NREL/Alliance, however, may not be used in any advertising or publicity to endorse or promote any products or commercial entities unless specific written permission is obtained from DOE/NREL/Alliance. The user also understands that DOE/NREL/Alliance is not obligated to provide the user with any support, consulting, training or assistance of any kind with regard to the use of these Data or to provide the user with any updates, revisions or new versions of these Data.
YOU AGREE TO INDEMNIFY THE GOVERNMENT AND DOE/NREL/ALLIANCE, AND ITS SUBSIDIARIES, AFFILIATES, OFFICERS, AGENTS, AND EMPLOYEES AGAINST ANY CLAIM OR DEMAND, INCLUDING REASONABLE ATTORNEYS' FEES, RELATED TO YOUR USE OF THESE DATA. THESE DATA ARE PROVIDED BY DOE/NREL/ALLIANCE "AS IS" AND ANY EXPRESS OR IMPLIED WARRANTIES, INCLUDING BUT NOT LIMITED TO, THE IMPLIED WARRANTIES OF MERCHANTABILITY AND FITNESS FOR A PARTICULAR PURPOSE ARE DISCLAIMED. IN NO EVENT SHALL THE GOVERNMENT OR DOE/NREL/ALLIANCE BE LIABLE FOR ANY SPECIAL, INDIRECT OR CONSEQUENTIAL DAMAGES OR ANY DAMAGES WHATSOEVER, INCLUDING BUT NOT LIMITED TO CLAIMS ASSOCIATED WITH THE LOSS OF DATA OR PROFITS, WHICH MAY RESULT FROM AN ACTION IN CONTRACT, NEGLIGENCE OR OTHER TORTIOUS CLAIM THAT ARISES OUT OF OR IN CONNECTION WITH THE ACCESS, USE OR PERFORMANCE OF THESE DATA.

## General comment
This dataset represents the operation of other general industrial eqp, liquified petroleum fuel powered using lpg as a fuel source. Emissions and fuel‑consumption data are calculated using EPA’s Motor Vehicle Emission Simulator (MOVES), the regulatory model used to determine emission inventories for equipment used in construction, agriculture, industrial, and commercial sectors. The reference flows are: 1. the operation of equipment providing 1 MJ of energy; and 2. the operation of equipment for 1 hour.

## Technology
This process reflects the lpg-powered other general industrial eqp, liquified petroleum fuel powered used in the industrial sector, with an average horsepower of 1e+02 hp and a load factor of 0.54.

## Geography
This process represents emissions from equipment operated in all U.S. states.

## Time period
This process reflects the equipment as estimated in 2020. MOVES estimates daily emissions for weekdays and weekends by month and year for calendar years 1990 and 1999 through 2060.

## Reference product
- Operation of equipment; other general industrial equipment: 1 MJ

## Inputs
- Liquefied petroleum gas, dispensed at pump: 1 MJ; data quality (3,1,1,1,1)

## Outputs
All rows: data quality (3,1,1,1,1)
- 1,2,3,4,6,7,8-Heptachlorodibenzo-p-dioxin: 9.94019e-19 kg
- 1,2,3,4,6,7,8-Heptachlorodibenzofuran: 2.02145e-18 kg
- 1,2,3,4,7,8,9-Heptachlorodibenzofuran: 6.4653e-20 kg
- 1,2,3,4,7,8-Hexachlorodibenzo-p-dioxin: 6.4653e-20 kg
- 1,2,3,4,7,8-Hexachlorodibenzofuran: 1.82098e-19 kg
- 1,2,3,6,7,8-Hexachlorodibenzo-p-dioxin: 1.32314e-19 kg
- 1,2,3,6,7,8-Hexachlorodibenzofuran: 1.93792e-19 kg
- 1,2,3,7,8,9-Hexachlorodibenzo-p-dioxin: 8.23615e-20 kg
- 1,2,3,7,8,9-Hexachlorodibenzofuran: 5.29587e-20 kg
- 1,2,3,7,8-Pentachlorodibenzo-p-dioxin: 6.1813e-20 kg
- 1,2,3,7,8-Pentachlorodibenzofuran: 2.20522e-19 kg
- 1,3-Butadiene: 4.53681e-12 kg
- 2,3,4,6,7,8-Hexachlorodibenzofuran: 2.27204e-19 kg
- 2,3,4,7,8-Pentachlorodibenzofuran: 1.61493e-19 kg
- 2,3,7,8-Tetrachlorodibenzo-p-dioxin: 1.38161e-19 kg
- 2,3,7,8-Tetrachlorodibenzofuran: 4.61091e-19 kg
- Acenaphthene: 1.57962e-14, 6.07064e-14 kg (2 entries)
- Acenaphthylene: 5.37554e-14 kg
- Acetaldehyde: 5.67546e-11 kg
- Acrolein: 6.25749e-11 kg
- Anthracene: 1.47923e-14, 8.84335e-15 kg (2 entries)
- Arsenic compounds: 4.49646e-13 kg
- Carbon dioxide: 6.4228e-5 kg
- Benz[a]anthracene: 2.13751e-15, 3.46673e-14 kg (2 entries)
- Benzo[ghi]fluoranthene: 1.77069e-14 kg
- Carbon monoxide: 5.54364e-7 kg
- Chromium(VI): 4.78392e-15 kg
- Chrysene: 3.10206e-15, 7.28316e-14 kg (2 entries)
- Fluoranthene: 2.4603e-14, 1.01345e-13 kg (2 entries)
- Fluorene: 3.79465e-14, 1.06255e-13 kg (2 entries)
- Formaldehyde: 3.11642e-10 kg
- Manganese compounds: 1.93165e-13 kg
- Mercury(II): 1.20854e-15 kg
- Mercury: 1.27962e-14, 4.90522e-17 kg (2 entries)
- Methane: 2.91038e-9 kg
- Naphthalene: 1.21414e-13, 7.69338e-14 kg (2 entries)
- Nickel compounds: 6.66378e-13 kg
- 1,2,3,4,6,7,8,9-Octachlorodibenzo-p-dioxin: 7.8519e-18 kg
- 1,2,3,4,6,7,8,9-Octachlorodibenzofuran: 2.28875e-18 kg
- Nitrogen oxides: 1.07855e-7 kg
- Phenanthrene: 1.06189e-13, 7.14193e-14 kg (2 entries)
- Particulate matter, ≤ 2.5μm: 6.72498e-9 kg
- Particulate matter, ≤ 10μm: 6.72498e-9 kg
- Pyrene: 4.75666e-14, 1.94419e-13 kg (2 entries)
- Sulfur dioxide: 3.16109e-10 kg
- Hydrocarbons: 1.60794e-8 kg
- Volatile organic compounds: 1.27082e-8 kg
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
## Completeness
The results include emissions from running exhaust, crankcase venting, refueling vapor and spillage, evaporative tank permeation, evaporative hose permeation, and fuel vapor venting from diurnal, hot soak, and running activity. Evaporative emissions while the equipment is soaking (engine off) are not included. Manufacturing of equipment, roads, and other infrastructure are not included in this dataset. The model for nonroad equipment does not include nitrous oxide (N2O).

## Data selection
MOVES runs were performed at the default settings at the state level.

## Data treatment
Emissions are calculated using an adjusted emission factor multiplied by rated power, load factor, engine population, and activity. The model uses base-year equipment populations by technology type and model year, and applies growth factors to estimate the population in the analysis year. Nonroad emissions by equipment type, fuel type, and age are estimated based on median life at full load, load factors, activity, and age distributions. Equipment populations are allocated to the county level using surrogate data.

## Data collection
MOVES runs were performed using MOVES4.0.1 in 2025.

## Sampling procedure
Emissions and activity data for each state are combined to generate an activity-weighted average for each region. No uncertainty was assessed.

## Use advice
This process has two reference units: MJ of energy delivered by the equipment, hour of equipment use.

## Intended application
The target audience of this model includes LCA practitioners, industry, and the general public. A full inventory of environmental flows are included; thus this unit process can be used for a full range of LCIA impact categories.

## Project
This dataset was developed by the Federal LCA Commons Data Curator Eastern Research Group, Inc. (ERG) under subcontract (SUB-2024-10066) to the National Renewable Energy Laboratory under Department of Energy (DOE) Prime Contract No. DE-AC36-08GO28308. The work is funded by DOE's Advanced Materials & Manufacturing Technologies Office (AMMTO).

## Sources
- ERG (2025) MOVES nonroad data
