# Transport, light commercial truck, gasoline powered, Northeast

Dataset: openLCA process, unit process
Category: 48-49: Transportation and Warehousing / 4841: General Freight Trucking
Time period: 2024-01-01 to 2024-12-31
Allocation method: physical allocation
Data quality: US EPA - Process Pedigree Matrix (2;1)
Exchange data quality scheme: US EPA - Flow Pedigree Matrix
Generated by: Franklin Associates, A Division of ERG
Published in: ERG (2025) MOVES onroad v1.0
restrictionsDescription: These U.S. LCI Database Project data ("Data") are provided by the National Renewable Energy Laboratory ("NREL"), operated by the Alliance for Sustainable Energy, LLC ("Alliance") for the US Department of Energy ("DOE") under Contract No. DE-AC36-08GO28308. The United States Government (the "Government") retains and the user acknowledges that the Government retains a non-exclusive, paid-up, irrevocable, worldwide license to publish or reproduce the published form of these data, or allow others to do so, for Government purposes.
Access to and use of these Data shall impose the following obligations on the user, as set forth in this Agreement. The user is granted the right, without any fee or cost, to use, copy, modify, alter, enhance and distribute these Data for any purpose whatsoever, provided that this entire notice appears in all copies of the Data. Any modification, alteration or enhancement of these data shall be identified and documented by the user. Further, the user agrees to credit the DOE/NREL/Alliance in any publication that results from the use of these Data. The names DOE/NREL/Alliance, however, may not be used in any advertising or publicity to endorse or promote any products or commercial entities unless specific written permission is obtained from DOE/NREL/Alliance. The user also understands that DOE/NREL/Alliance is not obligated to provide the user with any support, consulting, training or assistance of any kind with regard to the use of these Data or to provide the user with any updates, revisions or new versions of these Data.
YOU AGREE TO INDEMNIFY THE GOVERNMENT AND DOE/NREL/ALLIANCE, AND ITS SUBSIDIARIES, AFFILIATES, OFFICERS, AGENTS, AND EMPLOYEES AGAINST ANY CLAIM OR DEMAND, INCLUDING REASONABLE ATTORNEYS' FEES, RELATED TO YOUR USE OF THESE DATA. THESE DATA ARE PROVIDED BY DOE/NREL/ALLIANCE "AS IS" AND ANY EXPRESS OR IMPLIED WARRANTIES, INCLUDING BUT NOT LIMITED TO, THE IMPLIED WARRANTIES OF MERCHANTABILITY AND FITNESS FOR A PARTICULAR PURPOSE ARE DISCLAIMED. IN NO EVENT SHALL THE GOVERNMENT OR DOE/NREL/ALLIANCE BE LIABLE FOR ANY SPECIAL, INDIRECT OR CONSEQUENTIAL DAMAGES OR ANY DAMAGES WHATSOEVER, INCLUDING BUT NOT LIMITED TO CLAIMS ASSOCIATED WITH THE LOSS OF DATA OR PROFITS, WHICH MAY RESULT FROM AN ACTION IN CONTRACT, NEGLIGENCE OR OTHER TORTIOUS CLAIM THAT ARISES OUT OF OR IN CONNECTION WITH THE ACCESS, USE OR PERFORMANCE OF THESE DATA.

## General comment
This dataset represents the movement of goods via a Light Commercial Truck using Gasoline as a fuel source. Emissions and fuel consumption data are calculated using EPA's Motor Vehicle Emission Simulator (MOVES), the regulatory model to determine emission inventories for highway vehicles, including cars, trucks, and buses. The reference flow is the movement of 1 metric ton of goods for a distance of 1 km.

## Technology
Light-duty trucks include pickups, most sport utility vehicles (SUVs) and vans. In MOVES, passenger trucks and light commercial trucks are defined using FHWA's vehicle classification, which specifies that light-duty vehicles are those weighing less than 10,000 pounds, specifically vehicles with a gross vehicle weight rating (GVWR) in Class 1 and 2 (including 2a and 2b). An exception to this is that Class 2b trucks (8,500 to 10,000 lbs) with two axles or more and at least six tires, colloquially known as "duallies", are classified into the single unit truck category. A light-duty truck is considered a light commercial truck if it is registered to an organization or business.

## Geography
This process represents emissions from vehicles operating in the following U.S. states: ME, NH, VT, MA, CT, RI, NY, PA, NJ, MD, DE, DC.

## Time period
This process reflects the vehicle fleet as estimated in 2024. MOVES calculates an age distribution by vehicle type, where age is defined as the difference between a vehicle's model year and the year of analysis. MOVES employs a number of different age dependent factors, including deterioration of engine and emission after-treatment technology due to tampering and mal-maintenance, vehicle scrappage and fleet turnover and mileage accumulation over the lifetime of the vehicle.

## Reference product
- Transport, light commercial truck, gasoline powered: 1 t*km

## Inputs
- Gasoline, dispensed at pump: 4013.34 btu; data quality (3,1,1,1,1)

## Outputs
All rows: data quality (3,1,1,1,1)
- 1,3-Butadiene: 4.66148e-7 kg
- Acetaldehyde: 1.05034e-6 kg
- Acrolein: 6.41055e-8 kg
- Aluminum: 7.33098e-9 kg
- Ammonia: 3.10489e-5 kg
- Ammonium: 6.80301e-8 kg
- Carbon dioxide: 0.30772 kg
- Benzene: 2.90607e-6 kg
- Calcium: 3.72857e-8 kg
- Carbon monoxide: 0.00215794 kg
- Chloride: 2.61902e-9 kg
- Ethanol: 4.73201e-6 kg
- Formaldehyde: 8.09118e-7 kg
- Iron: 4.50299e-8 kg
- Magnesium: 3.49995e-9 kg
- Manganese compounds: 9.10976e-10 kg
- Methane: 1.24727e-5 kg
- Nitrate: 9.67092e-9 kg
- Nitrous oxide: 6.12366e-6 kg
- Organic carbon, PM2.5 LC: 1.76967e-6 kg
- Nitrogen oxides: 0.000150557 kg
- Potassium: 1.92665e-9 kg
- Particulate matter, ≤ 10μm: 4.63384e-6 kg
  Exhaust
- Particulate matter, ≤ 2.5μm: 4.09918e-6 kg
  Exhaust
- Particulate matter, ≤ 10μm: 1.6487e-5 kg
  Brakeware
- Particulate matter, ≤ 10μm: 6.1678e-6 kg
  Tireware
- Particulate matter, ≤ 2.5μm: 2.06087e-6 kg
  Brakeware
- Particulate matter, ≤ 2.5μm: 9.25166e-7 kg
  Tireware
- Silicon: 7.33098e-9 kg
- Sodium: 9.47313e-10 kg
- Sulfur dioxide: 1.61422e-6 kg
- Titanium: 7.70658e-10 kg
- Volatile organic compounds: 8.9364e-5 kg

## Completeness
Included in the inventory are emissions from operations (i.e., tailpipe exhaust) as well as idling and truck hotelling (both extended engine idling and auxiliary power unit use). Particulate matter from brake and tire wear is also included. Evaporative emissions while the vehicle is soaking (engine off) are not included. Manufacturing of vehicles, roads, and other infrastructure are not included in this dataset.

## Data selection
MOVES runs were performed at the default settings at the state level.

## Data treatment
MOVES combines in-use emission rates and detailed fleet populations and activity, frequently in the form of vehicle miles or kilometers traveled, to calculate inventories.
Average payload estimates are required to calculate LCI data per unit of good transported. The average payloads by MOVES source type were estimated from the 2002 Vehicle Inventory and Use Survey conducted by the US Census Bureau and 2012 and 2017 Freight Analysis Framework (FAF) statistics collected by the Federal Highway Administration.
The mean of the average reported payloads across 2002, 2012, and 2017 are used. The distance-weighted payload in US short tons as applied for light commercial trucks is 1.0 tons.

## Data collection
MOVES runs were performed using MOVES4.0.1 in 2024.

## Sampling procedure
Emissions and activity data for each state are combined to generate an activity-weighted average for each region. No uncertainty was assessed.

## Use advice
This process is intended to connect to fuel supply processes in the USLCI or electricity from the U.S. Electricity Baseline.

## Project
This dataset was developed by the Federal LCA Commons Data Curator Eastern Research Group, Inc. (ERG) under subcontract (SUB-2024-10066) to the National Renewable Energy Laboratory under Department of Energy (DOE) Prime Contract No. DE-AC36-08GO28308. The work is funded by DOE's Advanced Materials & Manufacturing Technologies Office (AMMTO).

## Review Independent external review
Review provided by NREL third-party; documentation and response documented in attached source.

## Sources
- USEPA (2024) MOVES4
- FHWA (2020) Freight Analysis Framework
